*HEADING
Cantilever Beam Complex 24 Elements Force -100000.0
*NODE
1, 0.0000, 0.0, 0.0
2, 0.4167, 0.0, 0.0
3, 0.8333, 0.0, 0.0
4, 1.2500, 0.0, 0.0
5, 1.6667, 0.0, 0.0
6, 2.0833, 0.0, 0.0
7, 2.5000, 0.0, 0.0
8, 2.9167, 0.0, 0.0
9, 3.3333, 0.0, 0.0
10, 3.7500, 0.0, 0.0
11, 4.1667, 0.0, 0.0
12, 4.5833, 0.0, 0.0
13, 5.0000, 0.0, 0.0
14, 5.4167, 0.0, 0.0
15, 5.8333, 0.0, 0.0
16, 6.2500, 0.0, 0.0
17, 6.6667, 0.0, 0.0
18, 7.0833, 0.0, 0.0
19, 7.5000, 0.0, 0.0
20, 7.9167, 0.0, 0.0
21, 8.3333, 0.0, 0.0
22, 8.7500, 0.0, 0.0
23, 9.1667, 0.0, 0.0
24, 9.5833, 0.0, 0.0
25, 10.0000, 0.0, 0.0
*USER ELEMENT, NODES=2, TYPE=U1, PROPERTIES=6, COORDINATES=3, VARIABLES=12
1, 2, 3, 4, 5, 6
*ELEMENT, TYPE=U1, ELSET=BEAM
1, 1, 2
2, 2, 3
3, 3, 4
4, 4, 5
5, 5, 6
6, 6, 7
7, 7, 8
8, 8, 9
9, 9, 10
10, 10, 11
11, 11, 12
12, 12, 13
13, 13, 14
14, 14, 15
15, 15, 16
16, 16, 17
17, 17, 18
18, 18, 19
19, 19, 20
20, 20, 21
21, 21, 22
22, 22, 23
23, 23, 24
24, 24, 25
*UEL PROPERTY, ELSET=BEAM
210.e9, 0.3, 0.01, 1.e-5, 1.e-5, 2.e-5
*BOUNDARY
1, 1, 6, 0.0
*STEP, NLGEOM=YES, INC=10000
*STATIC
0.03333333333333333, 1.0, 1e-10, 0.03333333333333333
*CLOAD
25, 2, -100000.0
*NODE PRINT
U,
*OUTPUT, FIELD
*NODE OUTPUT
U
*END STEP
